# Ортогон функц U и поиск разл
# по ним
K := 9
d := 0.6
d1 := 2*π*d
M := 2*K
s := 1/(1.1*(M + 1)*d*2.)
k := 2*π
gr := 180/π
# Дн АР
n := 0, 1 .. 2*K + 1
dt := 0.1*s
F(t) := sin(36*t)/(36*t)*190
F(0) = 190
F(s)/F(0) = 0.690291  # s -  полушир ДН
s = 0.0398724
a1 := 0, 0.2*s .. 0.125*k
F5(t) := sum(exp(-1i*k*d*(n - K)*t), n = 0 .. 2*K)*10
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sss := 0.001
s1 := 1.838*s
a := -1.2*s1, -1.2*s1 + 0.02*s1 .. 1.2*s1
# Цель чётная
dtn := -1.*s, -1.*s + dt*0.1 .. 1.*s  # Принятый сигнал
# сигн от дельта-функ
s2 := 1.5*s
Idel(a) := if(|a - s2 + sss| ≤ 0.002, 3000, if(|a + s2 - sss| ≤ 0.002, 3000, 0))
U00(a) := (F(a + s2) + F(a - s2))*20
# сигн от функ с 2 остр макс
Idel(t) := if(|t| > 1*s1, 0, 600*(sin(29*t)^94))
29
59
s1 = 0.0732855
# сигн от плавной функ
Idel(t) := if(|t| > s1, 0, 300*(sin(34.*t)^2 + 0))
U00(a) := integral(F(t - a)*Idel(t), t = -s1 .. s1)
s*0.67 = 0.0267145
a := -1.5*s1, -1.5*s1 + 0.02*s1 .. 1.5*s1
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# цель - рис для демонстрации
U00(0) = 3028.68
0.07/s = 1.7556
U00(-s) = 2515.5
s1 = 0.0732855
s2 = 0.0598086
1/sqrt(2) = 0.707107
U00(s*1.9) = 1470.57
U00(0)/U00(s*1.9) = 2.05953
0.07/0.055 = 1.27273
# поиск зоны U = 0.5 max
m2 := 0, 1 .. 402
U1[m2] := U00(-1*s + m2*dt*0.1)
L := max(U1)
L = 3028.68
n1 := 1/L
t := -s*2.33
s = 0.0398724
Given
U00(t)/L == 0.25
sn := Re(Find(t))
t := s*2.33
Given
t > 0
Re(U00(t))/L == 0.25
sv := Re(Find(t))
U00(sv)/U00(0) = 0.25
sv = 0.0997181
# Задание исходн сист ортонормир-ых ф-ий на заданном инт-ле располож-ия источника 2s1 для представления чётных ф-ий
# Ввод  Фурье cos
T := 2*s1
NR0 := 1/sqrt(T)
NR1 := sqrt(2/T)
g8(m, t) :=
    NR0 if m == 0
    otherwise
        NR1*cos(2*π*m/T*t) if |t| ≤ |s1|
        0 otherwise
# Ввод вейвлетов  MHAT
Nvf := 1/sqrt(2*s1)
W := 25
MH0(a) := Nvf
MH11(a) := (1 - (W*a)^2)*e^(-(W*a)^2)
NW := sqrt(integral(MH11(a)^2, a = -s1 .. s1))
MH1(a) := MH11(a)/NW
NW = 0.185375
a := -s1, -s1 + 0.025*s1 .. s1
MH2(a) :=
    MH1(2*(a + s1/2)) if a ≤ 0
    MH1(2*(a - s1/2)) otherwise
MH3(a) :=
    sqrt(2)*MH1(4*(a + 3*s1/4)) if -s1 ≤ a < -0.5*s1
    sqrt(2)*MH1(4*(a - 3*s1/4)) if 0.5*s1 ≤ a < s1
    0 otherwise
MH4(a) :=
    sqrt(2)*MH1(4*(a + s1/4)) if -0.5*s1 ≤ a < 0
    sqrt(2)*MH1(4*(a - s1/4)) if 0 ≤ a < 0.5*s1
    0 otherwise
g8(m, a) :=
    Nvf if m == 0
    MH1(a) if m == 1
    MH2(a) if m == 2
    MH3(a) if m == 3
    MH4(a) if m == 4
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# вид вейвлетов  MHAT
integral(g8(3, a)^2, a = -s1 .. s1) = 1
integral(g8(0, a)*g8(2, a), a = -s1 .. s1) = 0.5307
Da := 1/sqrt(2*s1)
# Ввод вейвлетов  Хаара
psi2(a) :=
    -sqrt(2)*Da if -s1 ≤ a < -0.875*s1
    sqrt(2)*Da if -0.875*s1 ≤ a < -0.625*s1
    -sqrt(2)*Da if -0.625*s1 ≤ a < -0.5*s1
    -sqrt(2)*Da if 0.5*s1 ≤ a < 0.625*s1
    sqrt(2)*Da if 0.625*s1 ≤ a < 0.875*s1
    -sqrt(2)*Da if 0.875*s1 ≤ a < s1
    0 otherwise
psi0(a) :=
    -Da if -s1 ≤ a < -0.5*s1
    Da if -0.5*s1 ≤ a < 0.5*s1
    -Da otherwise
psi1(a) :=
    -Da if -s1 ≤ a < -0.75*s1
    Da if -0.75*s1 ≤ a < -0.25*s1
    -Da if -0.25*s1 ≤ a < 0.25*s1
    Da if 0.25*s1 ≤ a < 0.75*s1
    -Da otherwise
psi3(a) :=
    -sqrt(2)*Da if -0.5*s1 ≤ a < -0.375*s1
    sqrt(2)*Da if -0.375*s1 ≤ a < -0.125*s1
    -sqrt(2)*Da if -0.125*s1 ≤ a < 0.125*s1
    sqrt(2)*Da if 0.125*s1 ≤ a < 0.375*s1
    -sqrt(2)*Da if 0.375*s1 ≤ a < 0.5*s1
    0 otherwise
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g(m, a) :=
    Da if m == 0
    psi0(a) if m == 1
    psi1(a) if m == 2
    psi2(a) if m == 3
    psi3(a) if m == 4
integral(psi3(a)*psi3(a), a = -s1 .. s1) = 1
# Ввод  Фурье cos
T := 2*s1
NR0 := 1/sqrt(T)
NR1 := sqrt(2/T)
g8(m, t) :=
    NR0 if m == 0
    otherwise
        NR1*cos(2*π*m/T*t) if |t| ≤ |s1|
        0 otherwise
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integral(g8(2, t)*g8(3, t), t = -s1 .. s1) = -7.73953e-17
# Образы функц источника - от заданных ф-ий на большем инт-ле 2sv
# число NT опред смотря ниже на L, чтобы не слишком близко к 0 собств знач-е
sr := sv
NT := 3
m := 0 .. NT
n := 0 .. NT
SP(f, h) := integral(f(t)*h(t), t = -sr .. sr)
sr = 0.0997181
s1 = 0.0732855
SP1(f, h) := integral(f(t)*h(t), t = -s1 .. s1)
UF(m, a) := integral(F(t - a)*g(m, t), t = -s1 .. s1)
UF8(m, a) := integral(F(t - a)*g8(m, t), t = -s1 .. s1)
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# Ортогонализация получ ф-ий  UF на основе собственных  векторов матрицы их скалярн произв-ий
A[n, m] := SP(UF(n), UF(m))
T := eigenvecs(A)
L := eigenvals(A)
A8[n, m] := SP(UF8(n), UF8(m))
T8 := eigenvecs(A8)
L8 := eigenvals(A8)
A = [
    244.978, 47.7788, 8.70717, 0.606421;
    47.7788, 19.6816, 3.13068, 0.0495025;
    8.70717, 3.13068, 0.507617, 0.0121029;
    0.606421, 0.0495025, 0.0121029, 0.00198079
]
A8 = [
    244.978, 54.2611, -9.96172, 4.25079;
    54.2611, 25.229, -4.0541, 1.70418;
    -9.96172, -4.0541, 0.663661, -0.279595;
    4.25079, 1.70418, -0.279595, 0.117822
]
transpose(T)*A*T = [255.022, 0, 0, 0; 0, 10.1465, 0, 0; 0, 0, 0.000150979, 0; 0, 0, 0, 1.88351e-11]
transpose(T8)*A8*T8 = [258.164, 0, 0, 0; 0, 12.8242, 0, 0; 0, 0, 0.000195324, 0; 0, 0, 0, 1.79058e-11]
cond2(A) = 1.35397e13
cond2(A8) = 1.44179e13
# ортогоналные ф-ии
a := -s1, -s1 + 0.075*|s1| .. s1  # нормы - собств знач матр T^ A T
gt1(m, a) := Re(sum(T[n, m]*UF(n, a), n = 0 .. NT))
NTT[n] := SP(gt1(n), gt1(n))
NTS := sqrt(NTT)
gt18(m, a) := Re(sum(T8[n, m]*UF8(n, a), n = 0 .. NT))
NTT8[n] := SP(gt18(n), gt18(n))
NTS8 := sqrt(NTT8)
gt(m, a) := gt1(m, a)/NTS[m]
gt8(m, a) := gt18(m, a)/NTS8[m]
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sqrt(L) = [15.9694; 3.18536; 0.0122874; 4.33994e-6]
sqrt(L8) = [16.0675; 3.58109; 0.0139758; 4.23153e-6]
integral(gt(3, t)*gt(3, t), t = -sr .. sr) = 1
T8 = [
    0.972759, 0.231578, -0.0105851, -0.000122354;
    0.227446, -0.962231, -0.149491, 0.00567586;
    -0.0412324, 0.132338, -0.898763, 0.415947;
    0.017571, -0.0544946, 0.412026, 0.909371
]
T = [
    0.979278, 0.202309, 0.00930231, -0.000126375;
    0.199292, -0.970305, 0.123312, 0.0598721;
    0.0359535, -0.132389, -0.910964, -0.389006;
    0.00236905, 0.00720086, -0.393513, 0.919288
]
# Задание сигнала с шумом
sv = 0.0997181
sn = -0.0997181
s1 = 0.0732855
r := 0.5*10^-10
UUU := U00(0)
U0S(a) := U00(a) + UUU*(0 + rnd(r) - 0.5*r)
NS := 50
ns := 0 .. NS
daS := 2*sv/NS
X[ns] := -sv + daS*ns
Y[ns] := Re(U0S(X[ns]))
S := cspline(X, Y)
U0(a) := interp(S, X, Y, a)
a := -sv, -sv + 0.05*sv .. sv
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# Вычисл коэфф разл-я по ортогон-ым образам
a := -sv, -sv + 0.05*sv .. sv
CT[m] := integral(U0(t)*gt(m, t), t = -sr .. sr)
U0T(t) := sum(CT[m]*gt(m, t), m = 0 .. NT)
CT8[m] := integral(U0(t)*gt8(m, t), t = -sr .. sr)
# для представ реш можно брать меньше ф-ий - NTR, хотя
# в каждой gis их NT штук
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# Проверка разлож напряж - ОК
CT = [997.571; 120.457; -0.38914; 3.08218e-5]
# Ортог-ые ф-ии gis, к-рые теперь исп-тся для представления ист-ка. gt - их образ. MHAT изнач-но не ортог - после тоже
gis8(n, t) := sum(T8[m, n]*g8(m, t), m = 0 .. NT)
gis(n, t) := sum(T[m, n]*g(m, t), m = 0 .. NT)
NTR := NT - 1
NT = 3
SP1(gis(2), gis(2)) = 1
SP1(gis8(1), gis8(1)) = 1
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Mpr[n, m] := integral(gis(m, t)*gis(n, t), t = -s1 .. s1)
Mp[n, m] := integral(g(m, t)*g(n, t), t = -s1 .. s1)
Mpr = [0.999953, 0, 0, 0; 0, 1, 0, 0; 0, 0, 1, 2.00576e-13; 0, 0, 2.00576e-13, 1]
Mp = [1, 0, 0, 0; 0, 1, 0, 0; 0, 0, 1, 0; 0, 0, 0, 1]
# РЕШЕНИЕИсточник
IT(t) := Re(sum(CT[n]*gis(n, t)/NTS[n], n = 0 .. NTR))
IT8(t) := Re(sum(CT8[n]*gis8(n, t)/NTS8[n], n = 0 .. NTR))
a := -s1, -s1 + 0.025*s1 .. s1
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# получ-е ортог-е ф -ии для предст-я реш на основе заданных и их образы - тоже ортог ф-ии для прест-я U
# на основе Хаара
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# Проверка  - ОК
UFPR(a) := Re(integral(F(t - a)*IT(t), t = -s1 .. s1))
UFPR8(a) := Re(integral(F(t - a)*IT8(t), t = -s1 .. s1))
a := -s1, -s1 + 0.2*s1 .. s1
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a := -s1, -s1 + 0.025*s1 .. s1
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ggU(m, a) := integral(F(t - a)*gis(m, t), t = -s1 .. s1)
GU(n, a) := sum(T[m, n]*UF(m, a), m = 0 .. NT)
# сравнение "похожести" ф-ий для источника gis и их интегральн образов. Получилось не одно и то же (собств ф-ии) но всё же похоже.
# это не соб ф
# Сами gis оказ-сь ортог и даже нормир-ны  т.к соб в-ры T ортог
STR[m, n] := sum(T[m, i]*T[n, i], i = 0 .. NT)
STR[1, 2] = -2.04038e-14
# Фу -оч хорош совпад с плавной, хорошо с острой, плохо дельта
ST[m, n] := sum(sum((T[m, j]*T[n, i])*integral(g(i, t)*g(j, t), t = -s1 .. s1), i = 0 .. NT), j = 0 .. NT)
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SP1(gis(2), gis(1)) = 2.77556e-16
# Реш при обычн разл по тем же ф-ям с решением СЛАУ при дискретн выборке знач напр-я
N := 3
m := 0 .. N
n := 0 .. N
sss := sv*0.9999
a4F[n] := -sss + n*sss/N
UNF[n] := U0(a4F[n])
GF[n, m] := integral(F(t - a4F[n])*g8(m, t), t = -s1 .. s1)
bF := Re(lsolve(GF, UNF))
IR(t) := sum(bF[m]*g8(m, t), m = 0 .. N)  # на интерв где задано распол цели
a := -s1, -s1 + 0.0125*|s1| .. s1
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# Сравнение
# для плавных и острых получим то же разлож решения по той же сист ф-ий
# вроде бы с теми же коэфф, но друг способом
# MHAT Хаар и Фурье - полн-ю динак одинак-е рез-ты по новому методу и
# при дискретн выборке знач напр.
# При  шуме устойчивость нового много выше! (Фурье - на 2 пор
# для MHAT -на порядок)
# Плавн MHAT  плохо предаёт - как и след ожид
# Хаар неплохо - дискретами.
cond2(GF) = 4716792
cond2(GF) = 4716792
# Хаар - хорошо острый
UUU := U00(0)
bF = [68.5291; -26.0207; -23.4196; 16.1497]
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CT = [997.571; 120.457; -0.38914; 3.08218e-5]
3*0.9/16 = 0.16875
# Видовое напряжен - повыше - для графика
NS4 := 200
r := 3.*10^-1
NS4 := 200
ns4 := 0 .. NS4
daS4 := 2*sv/NS4
U0S4(a) := U00(a) + UUU*(0 + rnd(r) - 0.5*r)
X4[ns4] := -sv + daS4*ns4
Y4[ns4] := Re(U0S4(X4[ns4]))
S4 := cspline(X4, Y4)
U04(a) := linterp(X4, Y4, a)
a := -s1, -s1 + 0.002*|s1| .. s1
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